# AguaClara Design Tool
Ti_wanted := 5 min
Q_Plant = 0.022
# [reference: BasicClientInputs.xmcd]
# [reference: ExpertInputs.xmcd]
# [reference: DesignAssumptions.xmcd]
# [reference: MathFunctions.xmcd]
# [reference: PipeDatabase.xmcd]
# [reference: MinorLossCoefficients.xmcd]
# [reference: FluidsFunctions.xmcd]
# [reference: Sedimentation Tank.xmcd]
# [reference: Floc Hopper - New Design.xmcd]
# [reference: FCM.xmcd]
# [reference: Flocculator 3.xmcd]
# [reference: Rapid Mix.xmcd]
# [reference: Materials List.xmcd]
# [reference: ChemStorageCylinders.xmcd]
# [reference: Final Doser Redo.xmcd]
# [reference: AutoCADMasterProgram.xmcd]
ND_SedManifold = 6 in
Q_Plant = 22 L/s
AC_FlocTank = [
    "-layer m floctank";
    "c t 91,91,91";
    "floctank";
    "  ";
    "_-view o t _zoom w 0.16,8.44,0 -3.68801,12.51,1.94572 _box 0,8.6,0 -3.52801,12.35,1.94572 _box 0.15,8.45,-0.15 -3.67801,12.5,1.94572 _subtract 0.15,8.45,-0.15  0,8.6,0 ";
    "_box -3.67801,9.1,0 0.15,9.25,1.94572";
    "_box -0.28883,9.1,0.5 0,9.25,0";
    "_subtract -3.67801,9.1,0  -0.28883,9.1,0.5 ";
    "_box -3.67801,9.75,0 0.15,9.9,1.94572";
    "_box -3.52801,9.75,0.5 -3.23917,9.9,0"
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]
AC_SedTank =  # no stored result
AC_ChemTanks = ["-layer m alumtanks"; "c t 132,132,132"; "alumtanks"; "  "; "_-view o t"; "_cylinder 2.12916,10.94314,2.82982 0.55686 1.66058"; "_cylinder 2.12916,10.94314,2.83482 0.55186 1.65558"; "_-view o t"; "_subtract 1.5723,10.94314,2.82982  1.5773,10.94314,2.82982 "; "_mirror all  2.11916,10.34628 2.13916,10.34628 "; "_union all "; "-layer s 0"; "  "; "-layer f alumtanks"; "  "]
# [component: inputs AC_FlocTank]
# [component: inputs AC_SedTank]
# [component: inputs AC_ChemTanks]
AC_EntranceTank = [
    "-layer m entrancetank"; "c t 214,214,214"; "entrancetank"; "  "; "_-view o t _zoom w 3.11831,12.34,1.22743 1.14,14.31831,2.22982 _box 2.95831,12.5,1.22743 1.3,14.15831,2.22982 _box 3.10831,12.35,1.07743 1.15,14.30831,2.22982 _subtract 3.10831,12.35,1.07743  2.95831,12.5,1.22743 "; "-layer s 0"; "  "; "-layer f entrancetank"; "  "; "-layer s entrancetank"
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]
