# AguaClara Water Treatment Plants
# Automated Design
# Add variable descriptions next to every varible so it is easy to interpret what this all means.
# Design References
# MathCAD dimension calculations:
# [reference: BasicInputs.xmcd]
# Use BasicClientInputs and ExpertClientInputs when this is run by LabVIEW.
# Use BasicInputs and ExpertInputs to use the program in MathCAD
# Change the reference by
# - right clicking
# - select properties
# - reference tab
# - type in the correct file name
# [reference: ExpertInputs.xmcd]
# [reference: DesignAssumptions.xmcd]
# [reference: MathFunctions.xmcd]
# [reference: PipeDatabase.xmcd]
# [reference: MinorLossCoefficients.xmcd]
# [reference: FluidsFunctions.xmcd]
# [reference: Sedimentation Tank.xmcd]
# [reference: Flocculator.xmcd]
# [reference: Rapid Mix.xmcd]
# [reference: LFOM.xmcd]
# [reference: EntranceTankDim.xmcd]
# [reference: Chemical Doser temp.xmcd]
# [reference: ChemStorageCylinders.xmcd]
# [reference: Materials List.xmcd]
# AutoCAD drawing programs:
# Translators:
# These are the codes that take MathCAD outputs and create AutoCAD scripts that are used to draw the plant (formerly Basics)
# [reference: MtoATranslators.xmcd]
# The wrapped MtoA translator contains the functions that the user will want to access. These functions will draw pieces with full functionality - specifying the location, dimension, and orientation of the object. Also, it contains layer control and subtraction capabilities for grouped objects.
# [reference: MtoATranslators Wrapped.xmcd]
# Plant Elements:
# These are all of the files that draw the fundamental parts of the plants (tees, elbows, tanks, pipes, etc)
# [reference: Channel.xmcd]
# [reference: cross.xmcd]
# [reference: Sludge.xmcd]
# [reference: Manifold.xmcd]
# [reference: pipe.xmcd]
# [reference: elbow.xmcd]
# [reference: Tee.xmcd]
# [reference: tank.xmcd]
# [reference: lamina.xmcd]
# [reference: adapter.xmcd]
# [reference: Tee2.xmcd]
# [reference: pvccap.xmcd]
# [reference: LaunderCap.xmcd]
# [reference: ChimneyStops.xmcd]
# [reference: laminaplain.xmcd]
# [reference: Stairs.xmcd]
# [reference: DrainChannel.xmcd]
# [reference: Manifold.xmcd]
# Specific Pieces:
# These are the codes that draw the bigger pieces of the plant (the sed tank, floc tank, etc)
# [reference: floctank.xmcd]
# [reference: chlorinestock.xmcd]
# [reference: SedTank- with pieces.xmcd]
# [reference: Entrance Tank.xmcd]
# [reference: AlumstockCylinder.xmcd]
# [reference: Plant Drain Channel.xmcd]
# [reference: Operator Access.xmcd]
# Layouts:
# This file will execute at the very end to create multiple views of the entire plant in paperspace
# [reference: Layouts.xmcd]
# Sed Tanks and Slopes:
N_SedTanks = 4
H_SedBetween = 0 cm  # Distance from the top of the inlet manifold to the bottom of the ledge supporting the lamella frame
L_Sed = 3.50332 m
N_SedBays = 1  # Number of bays of inlet manifolds in each sed tank
# Length of the port through which water exits the inlet manifold
# Width of ferrous cement plates in whice one manifold port is cut
Q_SedBay = 3 L/s
# Sedimentation Tank Sludge Drain:
N_SedSludgeOrifices = 35  # per cell
Ti_SludgeDrain = 30 min  # Tank Drain time
W_SedSludge = 9.62695 cm  # Width of the sludge channel
B_SedSludgeOrifices = 10 cm  # Distance center to center between drain orifices
H_SedSludge = 4.81347 cm  # Depth of the sludge channel
T_SedSludge = 5 cm
T_SedSludge = 5 cm
# Thickness of the plate topping the sludge channel
# through which drain holes are formed
W_SedDrainCover = 19.6269 cm
D_SedSludgeOrifice = 0.011 m  # Diameter of drain orifices
W_SedInletBottom = 0.441865 m
N_SedSludgeOrifices = 35
ND_SedSludgeValve = 2 in
# Sedimentation Tank Dimensions:
Z_SedSludge = 0.0981347 m  # Height from 0 of the top of the sludge drain
Z_SedSlopes = 0.820167 m  # Height from 0 of the top of the inlet manifold
W_Sed = 1.08 m  # Total tank wall height
L_Sed = 3.50332 m  # Total tank length
# Inlet Channel:
HW_InletChannel = 0.255898 m  # Width of the drop chimneys connecting channel to sed inlet manifolds
W_InletChannel = 0.41787 m  # length of drop chimmneys
L_Channel = 5.07 m
N_SedInletPipes = 2  # per sed bay
H_InletChannel = 0.355898 m
# Sedimentation Tank Effluent Launder:
N_SedLaunderOrifices = 44  # Number of orifices per launder
Q_SedLaunderOrifices = 7.12515e-5 m^3/s  # More Launder Dimensions
ND_SedLaunder = 4 in
B_SedLaunderOrifices = 0.100488 m  # Center to center launder spacing
L_SedLaunder = 2.35434 m
# Exit Channel:
D_SedLaunderOrifice = 0.511811 in
W_ExitChannel = 0.373167 m
H_ExitChannel = 0.355898 m
L_ExitChannel = 5.07 m
H_PltWeir = 0.265898 m  # height of the weir carrying water to the distribution tank
HW_ExitChannel = 0.215898 m  # water height in exit channel from 0
# Lamella:
L_SedPlate = 0.609667 m
B_SedPlate = 2.83328 cm  # center to center distance between lamella
S_SedPlate = 2.63328 cm  # spacing between lamella
N_SedPlates = 70  # Number of Sed Plates per Sedimentation Tank Bay.
AN_SedPlate = 60 deg
V_SedC = 10.2272 m/day
L_SedActive = 2.29011 m
T
V_SedUp = 68.5065 m/day
Z_SedLaunder = 1.54356 m
H_SedPlate = 0.527987 m
H_SedAbove = 0.151317 m  # Height of water needed above the lamella
N_SedPlates = 70
HW_Sed = 1.63773 m
H_Sed = 1.73773 m
Z_Mp = 1.38183 m
H_SedBayDivider = 0.820167 m
# Flocculator: | Look at Flocculator Positioning arrays
W_FlocChannel = 0.54 m
# Fill last channel with bafffles from last channel
# Fix port width to be based on energy dissipation in that channel
ED_Floc = 6 mW/kg
# Adjust spacing after the number of baffles per channel is known.
# Check the residence time of the flocculator should be at least 20minutes
HW_FlocEnd = 1.63773 m
X_FlocBaffles = [
    0.191266, 0.191266, 0.191266, 0.191266, 0.28193;
    0.364532, 0.364532, 0.364532, 0.364532, 0.460055;
    0.537798, 0.537798, 0.537798, 0.537798, 0.63818;
    0.711064, 0.711064, 0.711064, 0.711064, 0.816305;
    0.88433, 0.88433, 0.88433, 0.88433, 0.994429;
    1.0576, 1.0576, 1.0576, 1.0576, 1.17255;
    1.23086, 1.23086, 1.23086, 1.23086, 1.35068;
    1.40413, 1.40413, 1.40413, 1.40413, 1.5288;
    1.57739, 1.57739, 1.57739, 1.57739, 1.70693;
    1.75066, 1.75066, 1.75066, 1.75066, 1.88505;
    1.92393, 1.92393, 1.92393, 1.92393, 2.06318;
    2.09719, 2.09719, 2.09719, 2.09719, 2.2413;
    2.27046, 2.27046, 2.27046, 2.27046, 2.41943;
    2.44372, 2.44372, 2.44372, 2.44372, 2.59755;
    2.61699, 2.61699, 2.61699, 2.61699, 2.77568;
    2.79025, 2.79025, 2.79025, 2.79025, 2.9538;
    2.96352, 2.96352, 2.96352, 2.96352, 3.13193;
    3.13679, 3.13679, 3.13679, 3.13679, 3.31005;
    3.31005, 3.31005, 3.31005, 3.31005, 0
] m
L_FlocBaffles = [
    1.46646, 1.46646, 1.46646, 1.46646, 1.68465;
    1.68465, 1.68465, 1.68465, 1.68465, 1.46646;
    1.46646, 1.46646, 1.46646, 1.46646, 1.68465;
    1.68465, 1.68465, 1.68465, 1.68465, 1.46646;
    1.46646, 1.46646, 1.46646, 1.46646, 1.68465;
    1.68465, 1.68465, 1.68465, 1.68465, 1.46646;
    1.46646, 1.46646, 1.46646, 1.46646, 1.68465;
    1.68465, 1.68465, 1.68465, 1.68465, 1.46646;
    1.46646, 1.46646, 1.46646, 1.46646, 1.68465;
    1.68465, 1.68465, 1.68465, 1.68465, 1.46646;
    1.46646, 1.46646, 1.46646, 1.46646, 1.68465;
    1.68465, 1.68465, 1.68465, 1.68465, 1.46646;
    1.46646, 1.46646, 1.46646, 1.46646, 1.68465;
    1.68465, 1.68465, 1.68465, 1.68465, 1.46646;
    1.46646, 1.46646, 1.46646, 1.46646, 1.68465;
    1.68465, 1.68465, 1.68465, 1.68465, 1.46646;
    1.46646, 1.46646, 1.46646, 1.46646, 1.68465;
    1.68465, 1.68465, 1.68465, 1.68465, 1.46646;
    1.46646, 1.46646, 1.46646, 1.46646, 0
] m
Z_FlocBaffles = [
    0, 0, 0, 0, 0.176125;
    0.171266, 0.171266, 0.171266, 0.171266, 0;
    0, 0, 0, 0, 0.176125;
    0.171266, 0.171266, 0.171266, 0.171266, 0;
    0, 0, 0, 0, 0.176125;
    0.171266, 0.171266, 0.171266, 0.171266, 0;
    0, 0, 0, 0, 0.176125;
    0.171266, 0.171266, 0.171266, 0.171266, 0;
    0, 0, 0, 0, 0.176125;
    0.171266, 0.171266, 0.171266, 0.171266, 0;
    0, 0, 0, 0, 0.176125;
    0.171266, 0.171266, 0.171266, 0.171266, 0;
    0, 0, 0, 0, 0.176125;
    0.171266, 0.171266, 0.171266, 0.171266, 0;
    0, 0, 0, 0, 0.176125;
    0.171266, 0.171266, 0.171266, 0.171266, 0;
    0, 0, 0, 0, 0.176125;
    0.171266, 0.171266, 0.171266, 0.171266, 0;
    0, 0, 0, 0, 0
] m
N_FlocChannels = 5
L_FlocTank = 17.5166 m
HL_Floc = 16.8185 cm
HW_FlocStart = 1.80592 m
S_FlocBaffle = [17.1266; 17.1266; 17.1266; 17.1266; 17.6125] cm
B_FlocBaffle = [17.3266; 17.3266; 17.3266; 17.3266; 17.8125] cm
N_FlocChannelBaffles = [19; 19; 19; 19; 18]
W_FlocPort = [0.171266; 0.171266; 0.171266; 0.171266; 0.18249] m
HL_FlocChannels = [3.43354; 3.43354; 3.43354; 3.43354; 3.08437] cm
L_FlocBaffleLower = 1.46646 m
L_FlocBaffleUpper = 1.68465 m
H_FlocPort = [0.54; 0.54; 0.54; 0.54; 0.521164] m
Ti_Floc = 21.5156 min  # residence time of the flocculator
N_FlocBaffles = 94
# Materials List:
N_Launders = 4
L_LaunderPipeTotal = 9.41735 m
N_Valves = 4
N_LaunderCouplings = 4
N_ValveCouplings = 4
N_SedPlatesTotal = 280
N_SedPlatesPerSheet = 6
N_SedPlateSheets = 47
AC_SedTank =  # no stored result
AC_EntranceTank =  # no stored result
AC_FlocTank = [
    "-layer m FlocTank";
    "c t 132,132,132";
    "FlocTank";
    "  ";
    "_-view o t _zoom w 0.16,4.76,0 -3.66332,8.38,1.90592 _box 0,4.92,0 -3.50332,8.22,1.90592 _box 0.15,4.77,-0.15 -3.65332,8.37,1.90592 _subtract 0.15,4.77,-0.15  0,4.92,0 ";
    "_box -3.65332,5.46,0 0.15,5.61,1.90592";
    "_box -3.65332,6.15,0 0.15,6.3,1.90592";
    "_box -3.65332,6.84,0 0.15,6.99,1.90592";
    "_box -3.65332,7.53,0 0.15,7.68,1.90592";
    "-group c FlocTank y "
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]
AC_ChemTanks = ["-layer m alumtanks"; "c t 132,132,132"; "alumtanks"; "  "; "_-view o t"; "_cylinder 3.46406,8.94432,2.98214 0.4559 1.3577"; "_cylinder 3.46406,8.94432,2.98714 0.4509 1.3527"; "_-view o t"; "_subtract 3.00816,8.94432,2.98214  3.01316,8.94432,2.98214 "; "_mirror all  3.45406,8.43842 3.47406,8.43842 "; "_union all "; "-layer s 0"; "  "; "-layer f alumtanks"; "  "]
AC_OperatorAccess = [
    "-layer m Walkway";
    "c t 132,132,132";
    "Walkway";
    "  ";
    "_box 0.15,0,1.23773 1.65,8.37,1.53773";
    "-group c Walkway y ";
    "all ";
    "-layer s 0";
    "  ";
    "-layer f Walkway";
    "  ";
    "_box 0.15,0.49174,1.23773 0.29478,0.58826,1.53773";
    "-array all  R 4 1 1.23";
    "_box 0.15,5.12968,1.23773 0.33098,5.25033,1.53773";
    "_box 0.15,6.50968,1.23773 0.33098,6.63033,1.53773";
    "_box 0.15,7.88968,1.23773 0.33098,8.01033,1.53773";
    "-group c DeleteMe y ";
    "all ";
    "-layer t Walkway";
    "  ";
    "_subtract";
    "g Walkway";
    " g DeleteMe ";
    "-layer f Walkway";
    "  "
]
AC_DrainChannel = [
    "-layer m DrainChannel"; "c t 214,214,214"; "DrainChannel"; "  "; "3dpoly"; "0.3,-0.42432,-0.2024"; "0.3,-0.42432,-0.26898"; "0.3,-0.02432,-0.48555"; "0.3,0.37568,-0.26898"; "0.3,0.37568,-0.2024"
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]
